New Transformer.TR_0_sourcebus_650 phases=3 windings=2 buses=(sourcebus,650) conns=(wye,wye) kvs=(115.0,4.16) kvas=(5000.0,5000.0) xhl=0.5
New Transformer.TR_1_650_rg60 phases=3 windings=2 buses=(650,rg60) conns=(wye,wye) kvs=(4.16,4.411333) kvas=(4998.0,4998.0) xhl=0.5
New Transformer.TR_2_633_634 phases=3 windings=2 buses=(633,634) conns=(wye,wye) kvs=(4.16,0.48) kvas=(500.0,500.0) xhl=2.0
